// COMSOL Multiphysics 5.2.0.220 model "Labyrinthine3_Rectangle_2Para.mph"
// Outline of the model tree
// Components: comp1 "Component 1", comp2 "Component 2"

Parameters
  H = 25[mm]
  a1 = x1  // 1[mm]
  b1 = (x1+1[mm])/2  // 1.2[mm]
  a2 = x2  // 1.4[mm]
  b2 = 0.5*x1+x2+1.5[mm]  // 5.34[mm]
  a3 = x3  // 7.92[mm]
  b3 = 0.5*x1+x2+x3+2.5[mm]
  d = 1[mm]
  D = 1[mm]
  loss = 0.005  // 0.026
  W = 100[mm]
  x1 = 0.8[mm]
  x2 = 2[mm]
  x3 = 11[mm]

Variables
  var1 "Variables 1" [comp1]
    p_i = exp(-1i*acpr.k*x)[Pa]
    s11 = intop1(acpr.p_t-p_i)/intop1(p_i)
    s21 = intop2(acpr.p_t)/intop1(p_i)

Couplings
  intop1: Integration on boundaries 1
  intop2: Integration on boundaries 42

Geometry
  geom1 "Geometry 1" [comp1] (2D, length unit mm)
    r1: Rectangle | pos = {0, 0}; base = center; size = {W, H}
    b1: BezierPolygon "Bézier Polygon 1" (disabled)
      contributeto = csel1
      p = {{-b1, -b1}, {H/2-a1, -H/2}}
      degree = 1
      w = {1, 1}
    b2: BezierPolygon "Bézier Polygon 2" (disabled)
      contributeto = csel1
      p = {{-b2, -b2}, {H/2, a2-H/2}}
      degree = 1
      w = {1, 1}
    b3: BezierPolygon "Bézier Polygon 3" (disabled)
      contributeto = csel1
      p = {{-b3, -b3}, {H/2-a3, -H/2}}
      degree = 1
      w = {1, 1}
    r2: Rectangle | contributeto = csel1; pos = {-(x1+1[mm])/2, -x1/2}; base = center; size = {d, H-x1-2*D}
    r3: Rectangle | contributeto = csel1; pos = {-(0.5*x1+x2+1.5[mm]), x2/2}; base = center; size = {d, H-x2-2*D}
    r4: Rectangle | contributeto = csel1; pos = {-(0.5*x1+x2+x3+2.5[mm])+d/2, -x3/2}; base = center; size = {d, H-x3-2*D}
    rot1: Rotate | input = r2(1), r3(1), r4(1); keep = on; rot = 180
    r5: Rectangle | pos = {-(0.5*x1+x2+x3+2.5[mm]), -H/2}; size = {2*(0.5*x1+x2+x3+2.5[mm]), D}
    r6: Rectangle | pos = {-(0.5*x1+x2+x3+2.5[mm]), H/2-D}; size = {2*(0.5*x1+x2+x3+2.5[mm]), D}
    fin: Finalize "Form Union"
  geom2 "Geometry 2" [comp2] (2D, length unit m)
    r1: Rectangle | base = center; size = {H-1[mm], x1}
    r2: Rectangle | contributeto = csel1; pos = {-H+1[mm], 0}; base = center; size = {H-1[mm], x2}
    r3: Rectangle | contributeto = csel1; pos = {2*(-H+1[mm]), 0}; base = center; size = {H-1[mm], x3}
    r4: Rectangle
      contributeto = csel1
      pos = {2.5*(-H+1[mm])-(W/2-b3)/2, 0}
      base = center
      size = {0.05-(0.5*x1+x2+x3+2.5[mm]), H}
    mir1: Mirror | input = r2(1), r3(1), r4(1); keep = on
    fin: Finalize "Form Union"

Materials
  mat1: Common "Air 1" [comp1] on all domains
    def "Basic"
      density = 1.25*(1-loss*i)
      soundspeed = 343/(1-loss*i)
  mat2: Common "Air 1.1" [comp2] on all domains
    def "Basic"
      density = 1.25*(1-loss*i)
      soundspeed = 343/(1-loss*i)

Physics
  acpr: PressureAcoustics "Pressure Acoustics, Frequency Domain" [geom1] on domains 1
    dependent variable p
    fpam1: FrequencyPressureAcousticsModel "Pressure Acoustics 1" (default)
    shb1: SoundHard "Sound Hard Boundary (Wall) 1" (default)
    init1: init "Initial Values 1" (default)
    pwr1: PlaneWaveRadiation on boundaries 1, 42
      ipf1: IncidentPressureField on boundaries 1-3, 5, 7, 10, 11, 13, 16, 18, 20, 23, 26, 28, 30, 33, 36, 38, 41
        dir = {1, 0, 0}
        pamp = 1
    ishb1: InteriorSoundHard "Interior Sound Hard Boundary (Wall) 1" on no boundaries
  acpr2: PressureAcoustics "Pressure Acoustics, Frequency Domain 2" [geom2] on domains 1-7
    dependent variable p2
    fpam1: FrequencyPressureAcousticsModel "Pressure Acoustics 1" (default)
    shb1: SoundHard "Sound Hard Boundary (Wall) 1" (default)
    init1: init "Initial Values 1" (default)
    pwr1: PlaneWaveRadiation on boundaries 1, 34
      ipf1: IncidentPressureField on boundaries 1-33 | dir = {1, 0, 0}; pamp = 1

Mesh
  mesh1 "Mesh 1" [geom1] (physics-controlled)
    size: MeshSizeDefault | hauto = 4
  mesh2 "Mesh 2" [geom2] (physics-controlled)
    size: MeshSizeDefault | hauto = 4

Studies
  std1 "Study 1"
    eig: Eigenfrequency | neigs = 4; shift = 3000[Hz]; physselection = acpr; solve for = {acpr}
  std2 "Study 2"
    eig: Eigenfrequency | neigs = 4; shift = 3000[Hz]; physselection = acpr; solve for = {acpr2}
  std3 "Study 3"
    freq: Frequency "Frequency Domain" | punit = Hz; plist = range(100,100,5000); physselection = acpr; solve for = {acpr}

Solver configurations
  sol1 "Solution 1" (study std1)
    v1: Variables "Dependent Variables 1"
    e1: Eigenvalue "Eigenvalue Solver 1"
      rtol = 1.0E-6
      neigs = 4
      shift = 3000[Hz]
      transform = eigenfrequency
      eigref = 100
      dDef: Direct
  sol2 "Solution 2" (study std2)
    // same settings as sol1
  sol3 "Solution 3" (study std3)
    v1: Variables "Dependent Variables 1"
    s1: Stationary "Stationary Solver 1" | stol = 0.001
      dDef: Direct
      p1: Parametric | pname = freq; plistarr = range(100,100,5000); punit = Hz; pcontinuationmode = no
      fc1: FullyCoupled | linsolver = dDef

Datasets
  dset1: Solution | solution = sol1
  dset2: Solution | solution = sol1
  dset3: Solution | solution = sol2
  dset4: Solution | solution = sol2
  dset5: Solution | solution = sol3
  dset6: Solution | solution = sol3

Derived values
  gev1: EvalGlobal "Global Evaluation 1" | data = dset1; table = tbl1; expr = 0.5
  gev2: EvalGlobal "Global Evaluation 2" | data = dset4; table = tbl2; expr = 0.5
  gev3: EvalGlobal "Global Evaluation 3" | data = dset5; table = tbl5; expr = abs(s21)

Tables
  tbl1: Table
    // Global Evaluation 1 (0.5)
    Eigenfrequency | 0.5 (1)
    2.2762e-11-2.79063e-11i | 0.5
    1983.93+267.522i | 0.5
    2815.44+347.152i | 0.5
    4240.75+332.164i | 0.5
    5074.11+249.945i | 0.5
    6716.02+110.651i | 0.5
    7215.24+134.541i | 0.5
  tbl2: Table
    // Global Evaluation 2 (0.5)
    Eigenfrequency | 0.5 (1)
    2.94929e-12-3.57008e-10i | 0.5
    1915.55+261.644i | 0.5
    2714.39+341.108i | 0.5
    4098.16+323.778i | 0.5
    4947.03+245.289i | 0.5
    6934.86+139.354i | 0.5
    7314.48+208.295i | 0.5
  tbl3: Table
    // Global Evaluation 3 ()
    Eigenfrequency | abs(s21) (1)
    2.2762e-11-2.79063e-11i | 1
    1983.93+267.522i | 0.446441
    2815.44+347.152i | 0.574496
    4240.75+332.164i | 0.530135
    5074.11+249.945i | 0.442879
    6716.02+110.651i | 0.205178
    7215.24+134.541i | 0.033726
  tbl4: Table
    // Global Evaluation 3 (abs(s21))
    freq (Hz) | abs(s21) (1)
    100 | 0.477167
    200 | 0.265781
    300 | 0.185076
    400 | 0.144623
    500 | 0.121329
    600 | 0.106987
    700 | 0.0980236
    800 | 0.0926867
    900 | 0.0900677
    1000 | 0.0897126
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  tbl5: Table
    // Global Evaluation 3 (abs(s21))
    freq (Hz) | abs(s21) (1)
    100 | 0.598461
    200 | 0.354351
    300 | 0.250026
    400 | 0.195812
    500 | 0.163932
    600 | 0.143888
    700 | 0.130966
    800 | 0.122796
    900 | 0.118104
    1000 | 0.116202
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
Plots
  pg1: PlotGroup2D "Acoustic Pressure (acpr)" | data = dset1
    surf1: Surface | expr = acpr.p_t
  pg2: PlotGroup2D "Sound Pressure Level (acpr)" | data = dset1
    surf1: Surface | expr = acpr.Lp
  pg3: PlotGroup2D "Acoustic Pressure (acpr2)" | data = dset4
    surf1: Surface | expr = acpr2.p_t
  pg4: PlotGroup2D "Sound Pressure Level (acpr2)" | data = dset4
    surf1: Surface | expr = acpr2.Lp
  pg5: PlotGroup1D "1D Plot Group 5" | data = none
    tblp1: Table "Table Graph 1" | table = tbl1
    tblp2: Table "Table Graph 2" | table = tbl2
  pg6: PlotGroup1D "1D Plot Group 6" | data = none
  pg7: PlotGroup2D "Acoustic Pressure (acpr) 1" | data = dset5
    surf1: Surface | expr = acpr.p_t
  pg8: PlotGroup2D "Sound Pressure Level (acpr) 1" | data = dset5
    surf1: Surface | expr = acpr.Lp
  pg9: PlotGroup1D "1D Plot Group 9" | data = none
    tblp1: Table "Table Graph 1" | table = tbl4
  pg10: PlotGroup1D "1D Plot Group 10" | data = none
    tblp1: Table "Table Graph 1" | table = tbl5

Methods
  method1: CodeEditor "Method 1"
    public class method1 extends ApplicationMethod {
      public void execute() {
        model.geom("geom1").run();
        useGraphics(model.geom("geom1"), "form1/graphics1");
      }
    }
  method2: CodeEditor "Method 2"
    public class method2 extends ApplicationMethod {
      public void execute() {
        evaluateToResultsTable(model.result().numerical("gev1"), "tbl1", true);
        useGraphics(model.result("pg6"), "form1/graphics2");
      }
    }