// COMSOL Multiphysics 5.2.0.220 model "labyrinthine3_trans_phase.mph"
// Outline of the model tree

Parameters
  W = 0.1
  H = 0.025
  a1 = 0.0845[mm]  // 0.0026
  b1 = 2.335[mm]  // 0.00138
  a2 = 3.08[mm]  // 0.00408
  b2 = 9.785[mm]  // 0.00485
  a3 = 4.57[mm]  // 0.00724
  b3 = 0.015
  b4 = 0.0084
  a4 = 0.006
  a5 = 0.006
  b5 = 0.0117
  d = 0.001
  D = 0.0008
  loss = 0.026

Variables
  var1 "Variables 1"
    p_i = exp(-1i*acpr.k*x)[Pa]
    s11 = intop1(acpr.p_t-p_i)/intop1(p_i)
    s21 = intop2(acpr.p_t)/intop1(p_i)

Couplings
  intop1: Integration on boundaries 1
  intop2: Integration on boundaries 42

Geometry
  geom1 "Geometry 1" (2D, length unit m)
    r1: Rectangle | pos = {0, 0}; base = center; size = {W, H}
    b1: BezierPolygon "Bézier Polygon 1" (disabled)
      contributeto = csel1
      p = {{-b1, -b1}, {H/2-a1, -H/2}}
      degree = 1
      w = {1, 1}
    b2: BezierPolygon "Bézier Polygon 2" (disabled)
      contributeto = csel1
      p = {{-b2, -b2}, {H/2, a2-H/2}}
      degree = 1
      w = {1, 1}
    b3: BezierPolygon "Bézier Polygon 3" (disabled)
      contributeto = csel1
      p = {{-b3, -b3}, {H/2-a3, -H/2}}
      degree = 1
      w = {1, 1}
    r2: Rectangle | contributeto = csel1; pos = {-b1, -a1/2}; base = center; size = {d, H-a1-2*D}
    r3: Rectangle | contributeto = csel1; pos = {-b2, a2/2}; base = center; size = {d, H-a2-2*D}
    r4: Rectangle | contributeto = csel1; pos = {-b3+d/2, -a3/2}; base = center; size = {d, H-a3-2*D}
    rot1: Rotate | input = r2(1), r3(1), r4(1); keep = on; rot = 180
    r5: Rectangle | pos = {0, -H/2+D/2}; base = center; size = {2*b3, D}
    r6: Rectangle | pos = {0, H/2-D/2}; base = center; size = {2*b3, D}
    fin: Finalize "Form Union"

Materials
  mat1: Common "Air 1" on all domains
    def "Basic"
      density = 1.25*(1-loss*i)
      soundspeed = 343/(1-loss*i)

Physics
  acpr: PressureAcoustics "Pressure Acoustics, Frequency Domain" on domains 1
    dependent variable p
    fpam1: FrequencyPressureAcousticsModel "Pressure Acoustics 1" (default)
    shb1: SoundHard "Sound Hard Boundary (Wall) 1" (default)
    init1: init "Initial Values 1" (default)
    pwr1: PlaneWaveRadiation on boundaries 1, 42
      ipf1: IncidentPressureField on boundaries 1-3, 5, 7, 11, 13, 16, 20, 23, 26, 30, 36, 38, 41
        dir = {1, 0, 0}
        pamp = 1
    ishb1: InteriorSoundHard "Interior Sound Hard Boundary (Wall) 1" on no boundaries

Mesh
  mesh1 "Mesh 1" (physics-controlled)
    size: MeshSizeDefault | hauto = 7

Studies
  std1 "Study 1"
    freq: Frequency "Frequency Domain" | punit = Hz; plist = range(100,100,4000)
  std2 "Study 2"
    opt: Optimization
      optsolver = bobyqa
      opttol = 0.0001
      optobj = abs(comp1.s21)
      optobjEvaluateFor = freq
      objectivetype = maximization
      initval = {0.00336, 0.00359, 0.00734, 0.0014, 0.00495}
      scale = {1, 1, 1, 1, 1}
      lbound = {0.0026, 0.0030, 0.0064, 0.001, 0.0043}
      ubound = {0.0046, 0.0046, 0.008, 0.0018, 0.0057}
      pname = {a1, a2, a3, b1, b2}
      constrmethod = augLagrange
    freq: Frequency "Frequency Domain" | punit = Hz; plist = range(2000,20,3700)
  std3 "Study 3"
    eig: Eigenfrequency | neigs = 6; shift = 3000[Hz]

Solver configurations
  sol1 "Solution 1" (study std1)
    v1: Variables "Dependent Variables 1"
    s1: Stationary "Stationary Solver 1" | stol = 0.001
      dDef: Direct
      p1: Parametric | pname = freq; plistarr = range(100,100,4000); punit = Hz; pcontinuationmode = no
      fc1: FullyCoupled | linsolver = dDef
  sol2 "Solution 2" (study std2)
    v1: Variables "Dependent Variables 1"
    s1: Stationary "Stationary Solver 1"
      dDef: Direct
      p1: Parametric | pname = freq; plistarr = range(2000,20,3700); punit = Hz; pcontinuationmode = no
      fc1: FullyCoupled
  sol3 "Solution 3" (study std3)
    v1: Variables "Dependent Variables 1"
    e1: Eigenvalue "Eigenvalue Solver 1"
      rtol = 1.0E-6
      neigs = 6
      shift = 3000[Hz]
      transform = eigenfrequency
      eigref = 100
      dDef: Direct

Datasets
  dset1: Solution | solution = sol1
  dset2: Solution | solution = sol3

Derived values
  gev1: EvalGlobal "Global Evaluation 1" | data = dset1; table = tbl3; expr = abs(s21)
  gev2: EvalGlobal "Global Evaluation 2" | data = dset1; table = tbl4; expr = arg(intop2(p_i)/intop2(acpr.p_t))*180/pi

Tables
  tbl3: Table
    // Global Evaluation 1 (abs(s21))
    freq (Hz) | abs(s21) (1)
    100 | 0.779676
    200 | 0.540436
    300 | 0.403508
    400 | 0.324706
    500 | 0.276704
    600 | 0.24652
    700 | 0.227723
    800 | 0.216965
    900 | 0.212487
    1000 | 0.21346
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  tbl4: Table
    // Global Evaluation 2 (arg(intop2(p_i)/intop2(acpr.p_t))*180/pi)
    freq (Hz) | arg(intop2(p_i)/intop2(acpr.p_t))*180/pi (rad)
    100 | 36.3297
    200 | 54.2275
    300 | 62.6151
    400 | 67.0492
    500 | 69.661
    600 | 71.3618
    700 | 72.6059
    800 | 73.6562
    900 | 74.6899
    1000 | 75.8472
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
Plots
  pg12: PlotGroup1D "1D Plot Group 12" | data = none
    tblp1: Table "Table Graph 1" | table = tbl3
  pg15: PlotGroup1D "1D Plot Group 15" | data = none
    tblp2: Table "Table Graph 2" | table = tbl4

Methods
  method1: CodeEditor "Method 1"
    public class method1 extends ApplicationMethod {
      public void execute() {
        model.geom("geom1").run();
        useGraphics(model.geom("geom1"), "form1/graphics1");
      }
    }
  method2: CodeEditor "Method 2"
    public class method2 extends ApplicationMethod {
      public void execute() {
        evaluateToResultsTable(model.result().numerical("gev1"), "tbl1", true);
        useGraphics(model.result("pg6"), "form1/graphics2");
      }
    }