// COMSOL Multiphysics 5.2.0.220 model "Cell_Structure_Comparison.mph"
// Spiral optimization template 31Aug15
// Outline of the model tree
// Components: comp1 "Component 1", comp2 "Component 2"

Parameters
  L = 0.1[m]
  D = 0.036[m]
  d = 0.025[m]
  rho1 = 0.0008576
  rho2 = 0.0014683
  rho3 = 0.0025509
  rho4 = 0.0030951
  rho5 = 0.0056315
  rho6 = 0.0090588
  b1 = log(0.0125/rho6)*2/pi
  b2 = log(rho6/rho5)*2/pi
  b3 = log(rho5/rho4)*2/pi
  b4 = log(rho4/rho3)*2/pi
  b5 = log(rho3/rho2)*2/pi
  b6 = log(rho2/rho1)*2/pi
  a1 = d/2
  a2 = rho6/exp(-b2*1*pi/2)
  a3 = rho5/exp(-b3*2*pi/2)
  a4 = rho4/exp(-b4*3*pi/2)
  a5 = rho3/exp(-b5*4*pi/2)
  a6 = rho2/exp(-b6*5*pi/2)
  w = 0.001
  intval = 0.008
  a = 0.005

Variables
  var1 "Variables 1" [comp1]
    p_i = exp(-1i*acpr.k*x)[Pa]
    s11 = intop1(acpr.p_t-p_i)/intop1(p_i)
    s11p = s11*exp(i*acpr.k*(L-D))
    s21 = intop2(acpr.p_t)/intop1(p_i)
    s21p = s21*exp(i*acpr.k*(L-D))
  var2 "Variables 2" [comp2]
    p_i = exp(-1i*acpr2.k*x)[Pa]
    s11 = intop1(acpr2.p_t-p_i)/intop1(p_i)
    s11p = s11*exp(i*acpr2.k*(L-D))
    s21 = intop2(acpr2.p_t)/intop1(p_i)
    s21p = s21*exp(i*acpr2.k*(L-D))

Couplings
  intop1: Integration on boundaries 1
  intop2: Integration on boundaries 10
  intop3: Integration on boundaries 1

Probes
  bnd1: Boundary "Boundary Probe 1" [comp1] on boundaries 10 | expr = acpr.absp; table = tbl3
  bnd2: Boundary "Boundary Probe 2" [comp1] on boundaries 10 | expr = acpr.Lp; table = tbl3

Geometry
  geom1 "Geometry 1" [comp1] (2D, length unit m)
    b1: BezierPolygon "Bézier Polygon 1"
      p = {{D/2, a1*exp(-b1*pi/2)*sin(pi/2)}, {d/2, a1*exp(-b1*pi/2)*cos(pi/2)}}
      degree = 1
      w = {1, 1}
    pc1: ParametricCurve
      parname = theta
      parmin = 0*pi/180
      parmax = 90*pi/180
      coord = {a1*exp(-b1*theta)*sin(theta), a1*exp(-b1*theta)*cos(theta)}
    pc2: ParametricCurve
      parname = theta
      parmin = 90*pi/180
      parmax = 180*pi/180
      coord = {a2*exp(-b2*theta)*sin(theta), a2*exp(-b2*theta)*cos(theta)}
    pc3: ParametricCurve
      parname = theta
      parmin = 180*pi/180
      parmax = 270*pi/180
      coord = {a3*exp(-b3*theta)*sin(theta), a3*exp(-b3*theta)*cos(theta)}
    pc4: ParametricCurve
      parname = theta
      parmin = 270*pi/180
      parmax = 360*pi/180
      coord = {a4*exp(-b4*theta)*sin(theta), a4*exp(-b4*theta)*cos(theta)}
    pc5: ParametricCurve
      parname = theta
      parmin = 360*pi/180
      parmax = 450*pi/180
      coord = {a5*exp(-b5*theta)*sin(theta), a5*exp(-b5*theta)*cos(theta)}
    pc6: ParametricCurve
      parname = theta
      parmin = 450*pi/180
      parmax = 540*pi/180
      coord = {a6*exp(-b6*theta)*sin(theta), a6*exp(-b6*theta)*cos(theta)}
    rot1: Rotate | input = b1, pc1, pc2, pc3, pc4, pc5, pc6; keep = on; rot = 180
    r1: Rectangle | base = center; size = {L, d}
    fin: Finalize "Form Union"
  geom2 "Geometry 2" [comp2] (2D, length unit m)
    r1: Rectangle | size = {L, d}
    r2: Rectangle | contributeto = csel1; pos = {-intval/2, -a/2}; base = center; size = {w, d-a}
    r3: Rectangle | contributeto = csel1; pos = {-3/2*intval, a/2}; base = center; size = {w, d-a}
    rot1: Rotate | input = r2(1), r3(1); keep = on; rot = 180
    sq1: Square | pos = {-3/2*intval-a/2-w/2, d/2-a/2}; base = center; size = a
    fin: Finalize "Form Union"

Materials
  mat1: Common "Air" [comp1] on all domains
    def "Basic"
      density = 1.25*(1-0.005*i)
      soundspeed = 343/(1-0.005*i)
  mat3: Common "Air 1" [comp2] on domains 1
    def "Basic"
      density = 1.25*(1-0.005*i)
      soundspeed = 343/(1-0.005*i)

Physics
  acpr: PressureAcoustics "Pressure Acoustics, Frequency Domain" [geom1] on all domains
    dependent variable p
    fpam1: FrequencyPressureAcousticsModel "Pressure Acoustics 1" (default)
    shb1: SoundHard "Sound Hard Boundary (Wall) 1" (default)
    init1: init "Initial Values 1" (default)
    ishb1: InteriorSoundHard "Interior Sound Hard Boundary (Wall) 1" on all boundaries
    pwr1: PlaneWaveRadiation on boundaries 1, 10
      ipf1: IncidentPressureField on boundaries 1-9, 11-22 | pamp = 1
  acpr2: PressureAcoustics "Pressure Acoustics, Frequency Domain 2" [geom2] on domains 1
    dependent variable p2
    fpam1: FrequencyPressureAcousticsModel "Pressure Acoustics 1" (default)
    shb1: SoundHard "Sound Hard Boundary (Wall) 1" (default)
    init1: init "Initial Values 1" (default)
    pwr1: PlaneWaveRadiation on boundaries 1
      ipf1: IncidentPressureField on all boundaries | pamp = 1

Mesh
  mesh1 "Mesh 1" [geom1] (physics-controlled)
    size: MeshSizeDefault | hauto = 2
  mesh2 "Mesh 2" [geom2] (physics-controlled)
    size: MeshSizeDefault | hauto = 5

Studies
  std1 "Study 1"
    freq: Frequency "Frequency Domain" | punit = Hz; plist = range(100,10,4000)

Solver configurations
  sol1 "Solution 1" (study std1)
    v1: Variables "Dependent Variables 1"
    s1: Stationary "Stationary Solver 1" | stol = 0.001
      dDef: Direct
      p1: Parametric | pname = freq; plistarr = range(100,10,4000); punit = Hz; pcontinuationmode = no
      fc1: FullyCoupled | linsolver = dDef

Datasets
  dset1: Solution | solution = sol1
  dset2: Solution "Probe Solution 2" | solution = sol1
  avh1: Average "Boundary Probe 1" on boundaries 10 | data = dset2
  avh2: Average "Boundary Probe 2" on boundaries 10 | data = dset2

Derived values
  pev1: EvalPoint "Transmission_abs" on points 2 | data = dset1; table = tbl1; expr = abs(s21p)
  pev5: EvalPoint "Phase_delay" on points 2 | data = dset1; table = new; expr = arg(intop2(p_i)/intop2(acpr.p_t))*180/pi
  pev3: EvalPoint "Boundary Probe 1" | data = avh1; table = tbl3; expr = acpr.absp
  pev4: EvalPoint "Boundary Probe 2" | data = avh2; table = tbl3; expr = acpr.Lp

Tables
  tbl1: Table
    // Transmission_abs (abs(s21p))
    freq (Hz) | abs(s21p) (1), Point: 2
    100 | 0.903933
    110 | 0.887378
    120 | 0.870311
    130 | 0.852898
    140 | 0.835285
    150 | 0.817602
    160 | 0.799961
    170 | 0.782459
    180 | 0.765174
    190 | 0.748174
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  tbl2: Table
    // Phase delay (arg(intop2(p_i)/intop2(acpr.p_t))*180/pi)
    freq (Hz) | arg(intop2(p_i)/intop2(acpr.p_t))*180/pi (rad), Point: 2
    100 | 24.3458
    110 | 26.4151
    120 | 28.4009
    130 | 30.3028
    140 | 32.1211
    150 | 33.857
    160 | 35.512
    170 | 37.0884
    180 | 38.5887
    190 | 40.0156
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  tbl3: Table "Probe Table 3"
    freq | Absolute pressure (Pa), Boundary Probe 1 | Sound pressure level (dB), Boundary Probe 2
    100 | 0.903817 | 90.0907
    110 | 0.887252 | 89.93
    120 | 0.870177 | 89.7613
    130 | 0.852756 | 89.5856
    140 | 0.835135 | 89.4042
    150 | 0.817444 | 89.2183
    160 | 0.799797 | 89.0287
    170 | 0.782288 | 88.8364
    180 | 0.764998 | 88.6423
    190 | 0.747991 | 88.447
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
Plots
  pg1: PlotGroup2D "Acoustic Pressure (acpr)" | data = dset1
    surf1: Surface | expr = arg(acpr.p_t)
  pg2: PlotGroup2D "Sound Pressure Level (acpr)" | data = dset1
    surf1: Surface | expr = acpr.Lp
  pg3: PlotGroup1D "1D Plot Group 3" | data = none
    tblp1: Table "trans" | table = tbl1
  pg4: PlotGroup1D "1D Plot Group 4" | data = none
    tblp1: Table "Phase delay" | table = tbl2
  pg5: PlotGroup1D "Probe Plot Group 5"
    tblp1: Table "Probe Table Graph 1" | table = tbl3