// COMSOL Multiphysics 5.2.0.220 model "Labyrinthine3_Square.mph"
// Outline of the model tree

Parameters
  W = 0.1
  H = 0.025
  a1 = 0.845[mm]  // 0.845[mm]
  b1 = 0.845[mm]  // 0.845[mm]
  a2 = 1.22[mm]  // 1.22[mm]
  b2 = 3.45[mm]  // 3.45[mm]
  a3 = 7.24[mm]  // 7.24[mm]
  b3 = 0.0125
  b4 = 0.0084
  a4 = 0.006
  a5 = 0.006
  b5 = 0.0117
  d = 0.001
  D = 0.001
  loss = 0.005  // 0.026

Variables
  var1 "Variables 1"
    p_i = exp(-1i*acpr.k*x)[Pa]
    s11 = intop1(acpr.p_t-p_i)/intop1(p_i)
    s21 = intop2(acpr.p_t)/intop1(p_i)

Couplings
  intop1: Integration on boundaries 1
  intop2: Integration on boundaries 36

Geometry
  geom1 "Geometry 1" (2D, length unit m)
    r1: Rectangle | pos = {0, 0}; base = center; size = {W, H}
    r2: Rectangle | contributeto = csel1; pos = {-b1, -a1/2}; base = center; size = {d, H-a1-2*D}
    r3: Rectangle | contributeto = csel1; pos = {-b2, a2/2}; base = center; size = {d, H-a2-2*D}
    r4: Rectangle | contributeto = csel1; pos = {-b3+d/2, -a3/2}; base = center; size = {d, H-a3-2*D}
    rot1: Rotate | input = r2(1), r3(1), r4(1); keep = on; rot = 180
    r5: Rectangle | contributeto = csel1; pos = {-b3, -H/2}; base = corner; size = {2*b3, D}
    r6: Rectangle | contributeto = csel1; pos = {-b3, H/2-D}; base = corner; size = {2*b3, D}
    uni1: Union | input = r2, r3, r4, r5, r6, rot1; keep = off; intbnd = off; edge = all
    fin: Finalize "Form Union"

Materials
  mat1: Common "Air 1" on all domains
    def "Basic"
      density = 1.25*(1-loss*i)
      soundspeed = 343/(1-loss*i)

Physics
  acpr: PressureAcoustics "Pressure Acoustics, Frequency Domain" on domains 1, 3
    dependent variable p
    fpam1: FrequencyPressureAcousticsModel "Pressure Acoustics 1" (default)
    shb1: SoundHard "Sound Hard Boundary (Wall) 1" (default)
    init1: init "Initial Values 1" (default)
    pwr1: PlaneWaveRadiation on boundaries 1, 36
      ipf1: IncidentPressureField on boundaries 1-3, 5, 9, 10, 12, 20, 28, 32, 35 | dir = {1, 0, 0}; pamp = 1
    ishb1: InteriorSoundHard "Interior Sound Hard Boundary (Wall) 1" on no boundaries

Mesh
  mesh1 "Mesh 1" (physics-controlled)
    size: MeshSizeDefault | hauto = 1

Studies
  std1 "Study 1"
    freq: Frequency "Frequency Domain" | punit = Hz; plist = range(100,100,5000)
  std2 "Study 2"
    opt: Optimization
      optsolver = bobyqa
      opttol = 0.0001
      optobj = abs(s21)
      optobjEvaluateFor = freq
      objectivetype = maximization
      initval = {0.00336, 0.00359, 0.00734, 0.0014, 0.00495}
      scale = {1, 1, 1, 1, 1}
      lbound = {0.0026, 0.0030, 0.0064, 0.001, 0.0043}
      ubound = {0.0046, 0.0046, 0.008, 0.0018, 0.0057}
      pname = {a1, a2, a3, b1, b2}
      constrmethod = augLagrange
    freq: Frequency "Frequency Domain" | punit = Hz; plist = range(2000,20,3700)
  std3 "Study 3"
    opt: Optimization
      optsolver = bobyqa
      opttol = 0.0001
      optobj = sum(with(i,abs(real(freq-2000))), i, 1, 4)
      descr = Sum of a general expression for all indices from lower to upper
      optobjEvaluateFor = eig
      objectivetype = minimization
      multiobjective = sum
      initval = {0.845[mm], 1.22[mm], 7.24[mm], 0.845[mm], 3.45[mm]}
      scale = {1, 1, 1, 1, 1}
      lbound = {0.1[mm], 0.1[mm], 1[mm], 0.5[mm], 3[mm]}
      ubound = {4[mm], 4[mm], 8[mm], 2[mm], 5[mm]}
      pname = {a1, a2, a3, b1, b2}
      useconstrtable = on
    eig: Eigenfrequency | eigmethod = manual; neigs = 4; shift = 2000[Hz]

Solver configurations
  sol1 "Solution 1" (study std1)
    v1: Variables "Dependent Variables 1"
    s1: Stationary "Stationary Solver 1" | stol = 0.001
      dDef: Direct
      p1: Parametric | pname = freq; plistarr = range(100,100,5000); punit = Hz; pcontinuationmode = no
      fc1: FullyCoupled | linsolver = dDef
  sol2 "Solution 2" (study std2)
    v1: Variables "Dependent Variables 1"
    s1: Stationary "Stationary Solver 1" | stol = 0.001
      dDef: Direct
      p1: Parametric | pname = freq; plistarr = range(2000,20,3700); punit = Hz; pcontinuationmode = no
      fc1: FullyCoupled | linsolver = dDef
  sol3 "Solution 3" (study std3)
    v1: Variables "Dependent Variables 1"
    e1: Eigenvalue "Eigenvalue Solver 1"
      rtol = 1.0E-6
      neigs = 4
      shift = 2000[Hz]
      transform = eigenfrequency
      eigref = 100
      dDef: Direct

Datasets
  dset1: Solution | solution = sol1
  dset2: Solution | solution = sol3
  dset3: Solution | solution = sol2

Derived values
  gev1: EvalGlobal "Global Evaluation 1" | data = dset1; table = tbl6; expr = abs(s21)
  gev2: EvalGlobal "Global Evaluation 2" | data = dset2; table = tbl4; expr = 0.5

Tables
  tbl3: Table
    // Global Evaluation 1 (abs(s21))
    freq (Hz) | abs(s21) (1)
    100 | 0.520951
    200 | 0.296285
    300 | 0.2076
    400 | 0.162839
    500 | 0.137085
    600 | 0.121334
    700 | 0.111645
    800 | 0.10609
    900 | 0.103686
    1000 | 0.10397
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  tbl4: Table
    // Global Evaluation 2 (0.5)
    Eigenfrequency | 0.5 (1)
    2046.56+371.532i | 0.5
    2859.73+584.222i | 0.5
    3197.48+5703.71i | 0.5
    3723.89+451.453i | 0.5
    5005.14+255.757i | 0.5
    6915.16+258.695i | 0.5
    7175.98+281.065i | 0.5
    8125.53+542.194i | 0.5
    8515.31+820.014i | 0.5
  tbl5: Table
    // Global Evaluation 1 (abs(s21))
    freq (Hz) | abs(s21) (1)
    100 | 0.520951
    200 | 0.296285
    300 | 0.2076
    400 | 0.162839
    500 | 0.137085
    600 | 0.121334
    700 | 0.111645
    800 | 0.10609
    900 | 0.103686
    1000 | 0.10397
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  tbl6: Table
    // Global Evaluation 1 (abs(s21))
    freq (Hz) | abs(s21) (1)
    100 | 0.520951
    200 | 0.296285
    300 | 0.2076
    400 | 0.162839
    500 | 0.137085
    600 | 0.121334
    700 | 0.111645
    800 | 0.10609
    900 | 0.103686
    1000 | 0.10397
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  tbl8: Table "Objective Table 8"
    a1 | a2 | a3 | b1 | b2 | Objective
    0.000845 | 0.00122 | 0.00724 | 0.000845 | 0.00345 | 8675.74
    0.000995 | 0.00122 | 0.00724 | 0.000845 | 0.00345 | 8383.16
    0.000845 | 0.00137 | 0.00724 | 0.000845 | 0.00345 | 8386.75
    0.000845 | 0.00122 | 0.00739 | 0.000845 | 0.00345 | 8681.82
    0.000845 | 0.00122 | 0.00724 | 0.000995 | 0.00345 | 8658.01
    0.000845 | 0.00122 | 0.00724 | 0.000845 | 0.0036 | 8371.52
    0.000695 | 0.00122 | 0.00724 | 0.000845 | 0.00345 | 8382.45
    0.000845 | 0.00107 | 0.00724 | 0.000845 | 0.00345 | 8668.75
    0.000845 | 0.00122 | 0.00709 | 0.000845 | 0.00345 | 8379.84
    0.000845 | 0.00122 | 0.00724 | 0.000695 | 0.00345 | 8376.41
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  tbl10: Table "Objective Table 10"
    a1 | a2 | a3 | b1 | b2 | Objective
    0.00336 | 0.00359 | 0.00734 | 0.0014 | 0.00495 | 73100

Plots
  pg12: PlotGroup1D "1D Plot Group 12" | data = none; preserveaspect = off
    tblp1: Table "Table Graph 1" | table = tbl3
    tblp2: Table "Table Graph 2" | table = tbl4
  pg13: PlotGroup1D "1D Plot Group 13" | data = none
  pg14: PlotGroup1D "1D Plot Group 14" | data = none
    tblp1: Table "Table Graph 1" | table = tbl3
  pg15: PlotGroup1D "1D Plot Group 15" | data = none
    tblp1: Table "Table Graph 1" | table = tbl5
  pg16: PlotGroup1D "1D Plot Group 16" | data = none
    tblp1: Table "Table Graph 1" | table = tbl6

Methods
  method1: CodeEditor "Method 1"
    public class method1 extends ApplicationMethod {
      public void execute() {
        model.geom("geom1").run();
        useGraphics(model.geom("geom1"), "form1/graphics1");
      }
    }
  method2: CodeEditor "Method 2"
    public class method2 extends ApplicationMethod {
      public void execute() {
        evaluateToResultsTable(model.result().numerical("gev1"), "tbl1", true);
        useGraphics(model.result("pg6"), "form1/graphics2");
      }
    }