// COMSOL Multiphysics 5.2.0.220 model "Labyrinthine3__EigOpt_matlab.mph"
// Outline of the model tree

Parameters
  W = 0.1
  H = 0.025
  a1 = 0.845[mm]  // 0.845[mm]
  b1 = 0.845[mm]  // 0.845[mm]
  a2 = 1.22[mm]  // 1.22[mm]
  b2 = 3.45[mm]  // 3.45[mm]
  a3 = 7.24[mm]  // 7.24[mm]
  b3 = 0.0125
  b4 = 0.0084
  a4 = 0.006
  a5 = 0.006
  b5 = 0.0117
  d = 0.001
  D = 0.001
  loss = 0.005  // 0.026

Functions
  extm1: MATLAB | funcs = {CompFreq, "a1,a2,a3,b1,b2"}

Variables
  var1 "Variables 1"
    p_i = exp(-1i*acpr.k*x)[Pa]
    s11 = intop1(acpr.p_t-p_i)/intop1(p_i)
    s21 = intop2(acpr.p_t)/intop1(p_i)

Couplings
  intop1: Integration on boundaries 1
  intop2: Integration on boundaries 36

Geometry
  geom1 "Geometry 1" (2D, length unit m)
    r1: Rectangle | pos = {0, 0}; base = center; size = {W, H}
    r2: Rectangle | contributeto = csel1; pos = {-b1, -a1/2}; base = center; size = {d, H-a1-2*D}
    r3: Rectangle | contributeto = csel1; pos = {-b2, a2/2}; base = center; size = {d, H-a2-2*D}
    r4: Rectangle | contributeto = csel1; pos = {-b3+d/2, -a3/2}; base = center; size = {d, H-a3-2*D}
    rot1: Rotate | input = r2(1), r3(1), r4(1); keep = on; rot = 180
    r5: Rectangle | contributeto = csel1; pos = {-b3, -H/2}; size = {2*b3, D}
    r6: Rectangle | contributeto = csel1; pos = {-b3, H/2-D}; size = {2*b3, D}
    uni1: Union | input = r2, r3, r4, r5, r6, rot1; intbnd = off; edge = all
    fin: Finalize "Form Union"

Materials
  mat1: Common "Air 1" on all domains
    def "Basic"
      density = 1.25*(1-loss*i)
      soundspeed = 343/(1-loss*i)

Physics
  acpr: PressureAcoustics "Pressure Acoustics, Frequency Domain" on domains 1
    dependent variable p
    fpam1: FrequencyPressureAcousticsModel "Pressure Acoustics 1" (default)
    shb1: SoundHard "Sound Hard Boundary (Wall) 1" (default)
    init1: init "Initial Values 1" (default)
    pwr1: PlaneWaveRadiation on boundaries 1, 36
      ipf1: IncidentPressureField on boundaries 1-3, 5, 9, 10, 12, 20, 28, 32, 35 | dir = {1, 0, 0}; pamp = 1
    ishb1: InteriorSoundHard "Interior Sound Hard Boundary (Wall) 1" on no boundaries

Mesh
  mesh1 "Mesh 1" (physics-controlled)
    size: MeshSizeDefault | hauto = 1

Studies
  std1 "Study 1"
    eig: Eigenfrequency | shift = 100[Hz]
  std2 "Study 2"
    opt: Optimization
      optsolver = bobyqa
      opttol = 0.0001
      optobj = CompFreq(a1,a2,a3,b1,b2)
      initval = {0.845[mm], 1.22[mm], 7.24[mm], 0.845[mm], 3.45[mm]}
      scale = {1, 1, 1, 1, 1}
      lbound = {0.1[mm], 0.1[mm], 1[mm], 0.5[mm], 3[mm]}
      ubound = {4[mm], 4[mm], 8[mm], 2[mm], 5[mm]}
      pname = {a1, a2, a3, b1, b2}
      constrmethod = augLagrange

Solver configurations
  sol1 "Solution 1" (study std2)
    v1: Variables "Dependent Variables 1"

Datasets
  dset1: Solution | solution = sol1

Methods
  method1: CodeEditor "Method 1"
    public class method1 extends ApplicationMethod {
      public void execute() {
        model.geom("geom1").run();
        useGraphics(model.geom("geom1"), "form1/graphics1");
      }
    }
  method2: CodeEditor "Method 2"
    public class method2 extends ApplicationMethod {
      public void execute() {
        evaluateToResultsTable(model.result().numerical("gev1"), "tbl1", true);
        useGraphics(model.result("pg6"), "form1/graphics2");
      }
    }