// COMSOL Multiphysics 5.2.0.220 model "labyrinthine3_matlab.mph"
// Outline of the model tree

Parameters
  W = 0.1
  H = 0.025
  a1 = 0.00336
  b1 = 0.0014
  a2 = 0.00359
  b2 = 0.00495
  a3 = 0.00734
  b3 = 0.015
  b4 = 0.0084
  a4 = 0.006
  a5 = 0.006
  b5 = 0.0117

Variables
  var1 "Variables 1"
    p_i = exp(-1i*acpr.k*x)[Pa]
    s11 = intop1(acpr.p_t-p_i)/intop1(p_i)
    s21 = intop2(acpr.p_t)/intop1(p_i)

Couplings
  intop1: Integration on boundaries 1
  intop2: Integration on boundaries 16

Geometry
  geom1 "Geometry 1" (2D, length unit m)
    r1: Rectangle | pos = {0, 0}; base = center; size = {W, H}
    b1: BezierPolygon "Bézier Polygon 1" | contributeto = csel1; p = {{-b1, -b1}, {H/2-a1, -H/2}}; degree = 1; w = {1, 1}
    b2: BezierPolygon "Bézier Polygon 2" | contributeto = csel1; p = {{-b2, -b2}, {H/2, a2-H/2}}; degree = 1; w = {1, 1}
    b3: BezierPolygon "Bézier Polygon 3" | contributeto = csel1; p = {{-b3, -b3}, {H/2-a3, -H/2}}; degree = 1; w = {1, 1}
    rot1: Rotate | input = b1(1), b2(1), b3(1); keep = on; rot = 180
    b4: BezierPolygon "Bézier Polygon 4" (disabled)
      contributeto = csel1
      p = {{-b4, -b4}, {H/2-a4, -H/2}}
      degree = 1
      w = {1, 1}
    b5: BezierPolygon "Bézier Polygon 5" (disabled)
      contributeto = csel1
      p = {{-b5, -b5}, {H/2, a5-H/2}}
      degree = 1
      w = {1, 1}
    rot2: Rotate (disabled) | input = b1(1), b2(1), b3(1), rot1(1), rot1(2), rot1(3); keep = on; rot = 180
    fin: Finalize "Form Union"

Materials
  mat1: Common "Air 1" on all domains
    def "Basic"
      density = 1.25*(1-0.005*i)
      soundspeed = 343/(1-0.005*i)

Physics
  acpr: PressureAcoustics "Pressure Acoustics, Frequency Domain" on domains 1
    dependent variable p
    fpam1: FrequencyPressureAcousticsModel "Pressure Acoustics 1" (default)
    shb1: SoundHard "Sound Hard Boundary (Wall) 1" (default)
    init1: init "Initial Values 1" (default)
    pwr1: PlaneWaveRadiation on boundaries 1, 16
      ipf1: IncidentPressureField on boundaries 1-3, 5, 7, 9, 11, 13, 15 | dir = {1, 0, 0}; pamp = 1
    ishb1: InteriorSoundHard "Interior Sound Hard Boundary (Wall) 1" on boundaries 4, 6, 8, 10, 12, 14

Mesh
  mesh1 "Mesh 1" (physics-controlled)
    size: MeshSizeDefault | hauto = 3

Studies
  std1 "Study 1"
    freq: Frequency "Frequency Domain" | punit = Hz; plist = range(100,100,4000)
  std2 "Study 2"
    opt: Optimization
      optsolver = bobyqa
      optobj = abs(comp1.s21)/32
      objectivetype = maximization
      objectivesolution = auto
      initval = {0.00336, 0.00359, 0.00734, 0.0014, 0.00505}
      scale = {1, 1, 1, 1, 1}
      lbound = {0.001, 0.001, 0.001, 0.001, 0.0040}
      ubound = {0.010, 0.010, 0.010, 0.0020, 0.006}
      pname = {a1, a2, a3, b1, b2}
    freq: Frequency "Frequency Domain" | punit = Hz; plist = range(1750,50,3300)

Solver configurations
  sol1 "Solution 1" (study std1)
    v1: Variables "Dependent Variables 1"
    s1: Stationary "Stationary Solver 1" | stol = 0.001
      dDef: Direct
      p1: Parametric | pname = freq; plistarr = range(100,100,4000); punit = Hz; pcontinuationmode = no
      fc1: FullyCoupled | linsolver = dDef
  sol2 "Solution 2" (study std2)
    v1: Variables "Dependent Variables 1"
    s1: Stationary "Stationary Solver 1" | stol = 0.001
      dDef: Direct
      p1: Parametric | pname = freq; plistarr = range(1750,50,3300); punit = Hz; pcontinuationmode = no
      fc1: FullyCoupled | linsolver = dDef

Datasets
  dset1: Solution | solution = sol1
  dset2: Solution | solution = sol2

Derived values
  gev1: EvalGlobal "Global Evaluation 1" | data = dset1; table = tbl1; expr = abs(s21)

Tables
  tbl1: Table
    // Global Evaluation 1 (abs(s21))
    freq (Hz) | abs(s21) (1)
    100 | 0.876589
    200 | 0.681907
    300 | 0.539969
    400 | 0.448954
    500 | 0.391182
    600 | 0.354895
    700 | 0.333435
    800 | 0.323182
    900 | 0.322344
    1000 | 0.330346
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  tbl3: Table "Objective Table 3"
    a1 | a2 | a3 | b1 | b2 | Objective
    0.00336 | 0.00359 | 0.00734 | 0.0014 | 0.00505 | 0.919549
    0.00346 | 0.00359 | 0.00734 | 0.0014 | 0.00505 | 0.919405
    0.00336 | 0.00369 | 0.00734 | 0.0014 | 0.00505 | 0.91976
    0.00336 | 0.00359 | 0.00744 | 0.0014 | 0.00505 | 0.919087
    0.00336 | 0.00359 | 0.00734 | 0.0015 | 0.00505 | 0.916324
    0.00336 | 0.00359 | 0.00734 | 0.0014 | 0.00515 | 0.917731
    0.00326 | 0.00359 | 0.00734 | 0.0014 | 0.00505 | 0.919698
    0.00336 | 0.00349 | 0.00734 | 0.0014 | 0.00505 | 0.91922
    0.00336 | 0.00359 | 0.00724 | 0.0014 | 0.00505 | 0.919853
    0.00336 | 0.00359 | 0.00734 | 0.0013 | 0.00505 | 0.916596
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
Plots
  pg1: PlotGroup2D "Acoustic Pressure (acpr)" | data = dset1
    surf1: Surface | expr = acpr.p_t
  pg2: PlotGroup2D "Sound Pressure Level (acpr)" | data = dset1
    surf1: Surface | expr = acpr.Lp
  pg3: PlotGroup1D "1D Plot Group 3" | data = none
    tblp1: Table "Table Graph 1" | table = tbl1
  pg4: PlotGroup2D "Acoustic Pressure (acpr) 1" | data = dset2
    surf1: Surface | expr = acpr.p_t
  pg5: PlotGroup2D "Sound Pressure Level (acpr) 1" | data = dset2
    surf1: Surface | expr = acpr.Lp