// COMSOL Multiphysics 5.2.0.220 model "Isotropic_asymmetric3.mph"
// Outline of the model tree

Parameters
  a1 = 2[mm]
  a2 = 3[mm]
  a3 = 2[mm]
  H = 12.5[mm]
  W = 0.1
  d = 1[mm]
  inc_W = 100[mm]
  inc_H = 26[mm]
  loss = 0.005
  b1 = 1[mm]
  b2 = 2[mm]
  a4 = 2[mm]
  b3 = 2[mm]
  a5 = 1[mm]
  b4 = 2[mm]
  a6 = H-(b1+b2+b3+b4+11/2*d)

Variables
  var1 "Variables 1"
    p_i = exp(-1i*acpr.k*x)[Pa]
    s11 = intop1(acpr.p_t-p_i)/intop1(p_i)
    s21 = intop2(acpr.p_t)/intop1(p_i)
    s21p = s21*exp(i*acpr.k*(inc_W-2*H))

Couplings
  intop1: Integration on boundaries 1
  intop2: Integration on boundaries 98

Geometry
  geom1 "Geometry 1" (2D, length unit m)
    r6: Rectangle | contributeto = csel1; pos = {-H, H/2-a1/2-1/4*d}; base = center; size = {d, H-a1-3/2*d}
    r3: Rectangle | contributeto = csel1; pos = {-H+b1+d, H/2+a2/2+1/4*d}; base = center; size = {d, H-a2-3/2*d}
    r2: Rectangle | contributeto = csel1; pos = {-H+b1+b2+2*d, H/2-a3/2-1/4*d}; base = center; size = {d, H-a3-3/2*d}
    r7: Rectangle | contributeto = csel1; pos = {-H+b1+b2+b3+3*d, H/2+a4/2+1/4*d}; base = center; size = {d, H-a4-3/2*d}
    r1: Rectangle
      contributeto = csel1
      pos = {-H+b1+b2+b3+b4+4*d, H/2-a5/2-1/4*d}
      base = center
      size = {d, H-a5-3/2*d}
    r8: Rectangle | contributeto = csel1; pos = {0, H/2+a6/2+1/4*d}; base = center; size = {d, H-a6-3/2*d}
    r4: Rectangle | contributeto = csel1; pos = {-H+b1+d/2, H-d/2}; base = corner; size = {H-b1, d}
    rot2: Rotate | contributeto = csel1; input = r6(1), r3(1), r2(1), r7(1), r1(1), r8(1), r4(1); keep = on; rot = 90
    rot3: Rotate
      contributeto = csel1
      input = r6(1), r3(1), r2(1), r7(1), r1(1), r8(1), r4(1), rot2(1), rot2(2), rot2(3), rot2(4), rot2(5), rot2(6), rot2(7)
      keep = on
      rot = 180
    uni1: Union
      input = r6(1), r3(1), r2(1), r7(1), r1(1), r8(1), r4(1), rot2(1), rot2(2), rot2(3), rot2(4), rot2(5), rot2(6), rot2(7), rot3(1), rot3(2), rot3(3), rot3(4), rot3(5), rot3(6), rot3(7), rot3(8), rot3(9), rot3(10), rot3(11), rot3(12), rot3(13), rot3(14)
      intbnd = off
      edge = all
    r5: Rectangle | base = center; size = {inc_W, inc_H}
    fin: Finalize "Form Union"

Materials
  mat1: Common "Air 1" on domains 1, 2, 4
    def "Basic"
      density = 1.25*(1-loss*i)
      soundspeed = 343/(1-loss*i)

Physics
  acpr: PressureAcoustics "Pressure Acoustics, Frequency Domain" on domains 1
    dependent variable p
    fpam1: FrequencyPressureAcousticsModel "Pressure Acoustics 1" (default)
    shb1: SoundHard "Sound Hard Boundary (Wall) 1" (default)
    init1: init "Initial Values 1" (default)
    ishb1: InteriorSoundHard "Interior Sound Hard Boundary (Wall) 1" on all boundaries
    pwr1: PlaneWaveRadiation on boundaries 1, 98
      ipf1: IncidentPressureField on boundaries 1-3, 8, 10, 16-18, 20, 22-24, 27, 29-35, 38, 42, 45-48, 54, 56, 57, 59, 61, 62, 66, 67, 73-75, 78-82, 84-86, 89, 90
        dir = {1, 0, 0}
        pamp = 1

Mesh
  mesh1 "Mesh 1" (physics-controlled)
    size: MeshSizeDefault | hauto = 4

Studies
  std1 "Study 1"
    freq: Frequency "Frequency Domain" | punit = Hz; plist = range(100,200,8000)
  std2 "Study 2"
    eig: Eigenfrequency | neigs = 6; shift = 3000[Hz]

Solver configurations
  sol1 "Solution 1" (study std1)
    v1: Variables "Dependent Variables 1"
    s1: Stationary "Stationary Solver 1" | stol = 0.001
      dDef: Direct
      p1: Parametric | pname = freq; plistarr = range(100,200,8000); punit = Hz; pcontinuationmode = no
      fc1: FullyCoupled | linsolver = dDef
  sol2 "Solution 2" (study std2)
    v1: Variables "Dependent Variables 1"
    e1: Eigenvalue "Eigenvalue Solver 1"
      rtol = 1.0E-6
      neigs = 6
      shift = 3000[Hz]
      transform = eigenfrequency
      eigref = 100
      dDef: Direct

Datasets
  dset1: Solution | solution = sol1
  dset2: Solution | solution = sol2

Derived values
  gev1: EvalGlobal "Global Evaluation 1" | data = dset1; table = tbl3; expr = abs(s21)
  gev2: EvalGlobal "Global Evaluation 2" | data = dset1; table = tbl2; expr = arg(s21)

Tables
  tbl1: Table
    // Global Evaluation 1 (abs(s21))
    freq (Hz) | abs(s21) (1)
    100 | 0.9632
    300 | 0.778868
    500 | 0.61488
    700 | 0.511235
    900 | 0.451449
    1100 | 0.421457
    1300 | 0.414111
    1500 | 0.427281
    1700 | 0.462849
    1900 | 0.526699
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  tbl2: Table
    // Global Evaluation 2 (arg(s21))
    freq (Hz) | arg(s21) (rad)
    100 | -0.435082
    300 | -1.18374
    500 | -1.76016
    700 | -2.23661
    900 | -2.66344
    1100 | -3.06687
    1300 | 2.8212
    1500 | 2.42338
    1700 | 2.01177
    1900 | 1.57156
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  tbl3: Table
    // Global Evaluation 1 (abs(s21))
    freq (Hz) | abs(s21) (1)
    100 | 0.939309
    300 | 0.684429
    500 | 0.503585
    700 | 0.400899
    900 | 0.341968
    1100 | 0.308388
    1300 | 0.29132
    1500 | 0.28663
    1700 | 0.292757
    1900 | 0.309866
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
Plots
  pg2: PlotGroup2D "Acoustic Pressure (acpr)" | data = dset1
    surf1: Surface | expr = acpr.p_t
  pg3: PlotGroup2D "Sound Pressure Level (acpr)" | data = dset1
    surf1: Surface | expr = acpr.Lp
  pg4: PlotGroup1D "1D Plot Group 4" | data = none
    tblp1: Table "Table Graph 1" | table = tbl1
  pg5: PlotGroup1D "1D Plot Group 5" | data = none
    tblp1: Table "Table Graph 1" | table = tbl2
  pg6: PlotGroup2D "Acoustic Pressure (acpr) 1" | data = dset2
    surf1: Surface | expr = acpr.p_t
  pg7: PlotGroup2D "Sound Pressure Level (acpr) 1" | data = dset2
    surf1: Surface | expr = acpr.Lp
  pg8: PlotGroup1D "1D Plot Group 8" | data = none
    tblp1: Table "Table Graph 1" | table = tbl3

Methods
  method1: CodeEditor "Method 1"
    public class method1 extends ApplicationMethod {
      public void execute() {
        model.geom("geom1").run();
        useGraphics(model.geom("geom1"), "form1/graphics1");
      }
    }