// COMSOL Multiphysics 5.2.0.220 model "example.mph"
// Example
// Outline of the model tree

Parameters
  sf = 1
  L = 0.01*sf[m]
  d = 0.0015*sf[m]
  w = 0.001*sf[m]
  L1 = 0.012*sf[m]
  R = w+L+d+w/2
  D = 2*R
  nmx = 1
  nmy = 1
  a = D/sqrt(2)

Variables
  var1 "Variables 1a"
    p_i = exp(-1i*acsl.k*x)[Pa]
    s11 = intop1(acsl.p_t-p_i)/intop1(p_i)
    s11p = s11*exp(i*acsl.k*(2*D))
    s21 = intop2(acsl.p_t)/intop1(p_i)
    s21p = s21*exp(i*acsl.k*(2*D))

Couplings
  intop1: Integration on boundaries 1
  intop2: Integration on boundaries 96

Geometry
  geom1 "Geometry 1" (2D, length unit m)
    r2: Rectangle | pos = {0, w/2+d+L/2}; base = center; size = {w, L}
    r3: Rectangle | pos = {-d-w, w/2+L/2}; base = center; size = {w, L}
    r4: Rectangle | pos = {-2*d-2*w, w/2+d+L/2}; base = center; size = {w, L}
    r5: Rectangle | pos = {-3*d-3*w, w/2+L/2}; base = center; size = {w, L}
    r6: Rectangle | pos = {-4*d-4*w, w/2+d+L/2}; base = center; size = {w, L}
    r7: Rectangle | pos = {-5*d-5*w, w/2+L/2}; base = center; size = {w, L}
    r8: Rectangle | pos = {-L/2, w/2+d+L+w/2}; base = center; size = {L+w, w}
    copy1: Copy | input = r2, r3, r4, r5, r6, r7, r8
    rot1: Rotate | input = copy1(1), copy1(2), copy1(3), copy1(4), copy1(5), copy1(6), copy1(7); rot = 90
    copy2: Copy | input = rot1(1), rot1(2), rot1(3), rot1(4), rot1(5), rot1(6), rot1(7)
    rot2: Rotate | input = copy2(1), copy2(2), copy2(3), copy2(4), copy2(5), copy2(6), copy2(7); rot = 90
    copy3: Copy | input = rot2(1), rot2(2), rot2(3), rot2(4), rot2(5), rot2(6), rot2(7)
    rot3: Rotate | input = copy3(1), copy3(2), copy3(3), copy3(4), copy3(5), copy3(6), copy3(7); rot = 90
    mov1: Move
      input = r2, r3, r4, r5, r6, r7, r8, rot1(1), rot1(2), rot1(3), rot1(4), rot1(5), rot1(6), rot1(7), rot2(1), rot2(2), rot2(3), rot2(4), rot2(5), rot2(6), rot2(7), rot3(1), rot3(2), rot3(3), rot3(4), rot3(5), rot3(6), rot3(7)
      displx = -(nmx-1)/2*D
      disply = -(nmy-1)/2*D
    arr1: Array | input = mov1; size = {nmx, nmy}; displ = {D-w, 0}
    r9: Rectangle | base = center; size = {nmx*D+2*D, nmy*D+2e-4}
    uni1: Union
      input = arr1(1%2C1%2C1), arr1(1%2C1%2C10), arr1(1%2C1%2C11), arr1(1%2C1%2C12), arr1(1%2C1%2C13), arr1(1%2C1%2C14), arr1(1%2C1%2C15), arr1(1%2C1%2C16), arr1(1%2C1%2C17), arr1(1%2C1%2C18), arr1(1%2C1%2C19), arr1(1%2C1%2C2), arr1(1%2C1%2C20), arr1(1%2C1%2C21), arr1(1%2C1%2C22), arr1(1%2C1%2C23), arr1(1%2C1%2C24), arr1(1%2C1%2C25), arr1(1%2C1%2C26), arr1(1%2C1%2C27), arr1(1%2C1%2C28), arr1(1%2C1%2C3), arr1(1%2C1%2C4), arr1(1%2C1%2C5), arr1(1%2C1%2C6), arr1(1%2C1%2C7), arr1(1%2C1%2C8), arr1(1%2C1%2C9)
      intbnd = off
      edge = all
    fin: Finalize "Form Union"

Materials
  mat2: Common "Material 2" on domains 1
    def "Basic"
      density = 1.25*(1-0.02*i)
      soundspeed = 343/(1-0.02*i)
  mat3: Common "Material 3" on domains 2-5
    def "Basic"
      density = 1130
      soundspeed = 900
      youngsmodulus = 2.3e9
      poissonsratio = 0.35

Physics
  acsl: AcousticSolid "Acoustic-Solid Interaction" on all domains
    dependent variable p2
    pam1: PressureAcousticsModel (default) | mu = 0; muB = 0; mu_mat = userdef; muB_mat = userdef
    shb1: SoundHard "Sound Hard Boundary (Wall) 1" (default)
    free1: Free (default)
    asb1: AcousticStructureBoundary (default)
    init1: init "Initial Values 1" (default)
    dlemm1: LinearElasticModel "Linear Elastic Material Model 1" on domains 2-5
    pwr1: PlaneWaveRadiation on boundaries 1
      ipf1: IncidentPressureField on all boundaries | pamp = 1
    pwr2: PlaneWaveRadiation on boundaries 96
    pc1: PeriodicCondition on boundaries 2, 3, 18, 29, 46, 61

Mesh
  mesh1 "Mesh 1"
    size: MeshSizeDefault | table = cfd; hauto = 7
    auto_f1: FreeTri "Free Triangular 1" on remaining entities

Studies
  std2 "Study 2"
    freq: Frequency "Frequency Domain" | plist = range(1000,2000,3500); punit = Hz

Solver configurations
  sol1 "Solver 1" (study std2)
    v1: Variables "Dependent Variables 1"
    s1: Stationary "Stationary Solver 1"
      dDef: Direct
      p1: Parametric | pname = freq; plistarr = range(1000,2000,3500)
      fc1: FullyCoupled

Datasets
  dset1: Solution | solution = sol1

Derived values
  pev1: EvalPoint "Point Evaluation 1" on points 2
    data = dset1
    table = tbl1
    expr = 1/acsl.k/D*acos((1-(s11p)^2+(s21p)^2)/2/s21p)
  pev2: EvalPoint "Point Evaluation 2" on points 2
    data = dset1
    table = tbl2
    expr = sqrt(((1+s11p)^2-(s21p)^2)/((1-s11p)^2-(s21p)^2))
    unit = 1
  pev3: EvalPoint "Point Evaluation 3" on points 2 | data = dset1; table = tbl3; expr = s21; unit = 1
  pev4: EvalPoint "Point Evaluation 4" on points 2
    data = dset1
    table = tbl4
    expr = imag(sqrt(((1+s11p)^2-(s21p)^2)/((1-s11p)^2-(s21p)^2)))
    unit = 1

Tables
  tbl1: Table
    // Point Evaluation (1/acsl.k/D*acos((1-(s11p)^2+(s21p)^2)/2/s21p))
    freq | 1/acsl.k/D*acos((1-(s11p)^2+(s21p)^2)/2/s21p), Point: 2
    186.567 | 4.49871-2.0423e-06i
    205.224 | 4.49914-1.87668e-06i
    223.881 | 4.49962-1.8735e-06i
    242.538 | 4.50015-1.84589e-06i
    261.194 | 4.50073-1.67189e-06i
    279.851 | 4.50136-1.56387e-06i
    298.508 | 4.50205-1.48152e-06i
    317.165 | 4.50279-1.35127e-06i
    335.821 | 4.5036-1.29651e-06i
    354.478 | 4.50447-1.20546e-06i
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  tbl2: Table
    // Point Evaluation (sqrt(((1+s11p)^2-(s21p)^2)/((1-s11p)^2-(s21p)^2)))
    freq | sqrt(((1+s11p)^2-(s21p)^2)/((1-s11p)^2-(s21p)^2)) (1), Point: 2
    186.567 | 7.75368+4.12412e-06i
    205.224 | 7.75357+3.91756e-06i
    223.881 | 7.75344+3.96969e-06i
    242.538 | 7.75331+3.98028e-06i
    261.194 | 7.75317+3.76788e-06i
    279.851 | 7.75301+3.65998e-06i
    298.508 | 7.75285+3.59273e-06i
    317.165 | 7.75268+3.46111e-06i
    335.821 | 7.75251+3.43932e-06i
    354.478 | 7.75233+3.37125e-06i
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  tbl3: Table
    // Point Evaluation (imag(1/acsl.k/D*acos((1-(s11p)^2+(s21p)^2)/2/s21p)))
    freq | imag(1/acsl.k/D*acos((1-(s11p)^2+(s21p)^2)/2/s21p)) (rad), Point: 2
    186.567 | -2.0423e-06
    205.224 | -1.87668e-06
    223.881 | -1.8735e-06
    242.538 | -1.84589e-06
    261.194 | -1.67189e-06
    279.851 | -1.56387e-06
    298.508 | -1.48152e-06
    317.165 | -1.35127e-06
    335.821 | -1.29651e-06
    354.478 | -1.20546e-06
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  tbl4: Table
    // Point Evaluation (imag(sqrt(((1+s11p)^2-(s21p)^2)/((1-s11p)^2-(s21p)^2))))
    freq | imag(sqrt(((1+s11p)^2-(s21p)^2)/((1-s11p)^2-(s21p)^2))) (1), Point: 2
    186.567 | 4.12412e-06
    205.224 | 3.91756e-06
    223.881 | 3.96969e-06
    242.538 | 3.98028e-06
    261.194 | 3.76788e-06
    279.851 | 3.65998e-06
    298.508 | 3.59273e-06
    317.165 | 3.46111e-06
    335.821 | 3.43932e-06
    354.478 | 3.37125e-06
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
Plots
  pg1: PlotGroup2D "Displacement (acsl)" | data = dset1
    surf1: Surface | expr = acsl.disp; unit = m
      def: Deform "Deformation" | expr = {u, v}
  pg2: PlotGroup2D "Acoustic Pressure (acsl)" | data = dset1
    surf2: Surface | expr = acsl.p_t
  pg3: PlotGroup1D "1D Plot Group 3" | data = none
    tblp1: Table "Table Graph 1" | table = tbl2