// COMSOL Multiphysics 5.2.0.220 model "labyrinthine3_matlab.mph"
// Outline of the model tree

Parameters
  W = 0.1
  H = 0.025
  a1 = 0.0026  // 0.0026
  b1 = 0.00138  // 0.00138
  a2 = 0.00408  // 0.00408
  b2 = 0.00485  // 0.00485
  a3 = 0.00724  // 0.00724
  b3 = 0.015
  b4 = 0.0084
  a4 = 0.006
  a5 = 0.006
  b5 = 0.0117
  d = 0.001
  D = 0.0008
  loss = 0.026

Variables
  var1 "Variables 1"
    p_i = exp(-1i*acpr.k*x)[Pa]
    s11 = intop1(acpr.p_t-p_i)/intop1(p_i)
    s21 = intop2(acpr.p_t)/intop1(p_i)

Couplings
  intop1: Integration on boundaries 1
  intop2: Integration on boundaries 42

Geometry
  geom1 "Geometry 1" (2D, length unit m)
    r1: Rectangle | pos = {0, 0}; base = center; size = {W, H}
    b1: BezierPolygon "Bézier Polygon 1" (disabled)
      contributeto = csel1
      p = {{-b1, -b1}, {H/2-a1, -H/2}}
      degree = 1
      w = {1, 1}
    b2: BezierPolygon "Bézier Polygon 2" (disabled)
      contributeto = csel1
      p = {{-b2, -b2}, {H/2, a2-H/2}}
      degree = 1
      w = {1, 1}
    b3: BezierPolygon "Bézier Polygon 3" (disabled)
      contributeto = csel1
      p = {{-b3, -b3}, {H/2-a3, -H/2}}
      degree = 1
      w = {1, 1}
    r2: Rectangle | contributeto = csel1; pos = {-b1, -a1/2}; base = center; size = {d, H-a1-2*D}
    r3: Rectangle | contributeto = csel1; pos = {-b2, a2/2}; base = center; size = {d, H-a2-2*D}
    r4: Rectangle | contributeto = csel1; pos = {-b3+d/2, -a3/2}; base = center; size = {d, H-a3-2*D}
    rot1: Rotate | input = r2(1), r3(1), r4(1); keep = on; rot = 180
    r5: Rectangle | pos = {0, -H/2+D/2}; base = center; size = {2*b3, D}
    r6: Rectangle | pos = {0, H/2-D/2}; base = center; size = {2*b3, D}
    fin: Finalize "Form Union"

Materials
  mat1: Common "Air 1" on all domains
    def "Basic"
      density = 1.25*(1-loss*i)
      soundspeed = 343/(1-loss*i)

Physics
  acpr: PressureAcoustics "Pressure Acoustics, Frequency Domain" on domains 1
    dependent variable p
    fpam1: FrequencyPressureAcousticsModel "Pressure Acoustics 1" (default)
    shb1: SoundHard "Sound Hard Boundary (Wall) 1" (default)
    init1: init "Initial Values 1" (default)
    pwr1: PlaneWaveRadiation on boundaries 1, 42
      ipf1: IncidentPressureField on boundaries 1-3, 5, 7, 11, 13, 16, 20, 23, 26, 30, 36, 38, 41
        dir = {1, 0, 0}
        pamp = 1
    ishb1: InteriorSoundHard "Interior Sound Hard Boundary (Wall) 1" on no boundaries

Mesh
  mesh1 "Mesh 1" (physics-controlled)
    size: MeshSizeDefault | hauto = 1

Studies
  std1 "Study 1"
    freq: Frequency "Frequency Domain" | punit = Hz; plist = range(100,100,4000)
  std2 "Study 2"
    opt: Optimization
      optsolver = bobyqa
      opttol = 0.0001
      optobj = abs(comp1.s21)
      optobjEvaluateFor = freq
      objectivetype = maximization
      initval = {0.00336, 0.00359, 0.00734, 0.0014, 0.00495}
      scale = {1, 1, 1, 1, 1}
      lbound = {0.0026, 0.0030, 0.0064, 0.001, 0.0043}
      ubound = {0.0046, 0.0046, 0.008, 0.0018, 0.0057}
      pname = {a1, a2, a3, b1, b2}
      constrmethod = augLagrange
    freq: Frequency "Frequency Domain" | punit = Hz; plist = range(2000,20,3700)
  std3 "Study 3"
    eig: Eigenfrequency | shift = 3000[Hz]

Solver configurations
  sol1 "Solution 1" (study std1)
    v1: Variables "Dependent Variables 1"
    s1: Stationary "Stationary Solver 1"
      dDef: Direct
      p1: Parametric | pname = freq; plistarr = range(100,100,4000); punit = Hz; pcontinuationmode = no
      fc1: FullyCoupled
  sol2 "Solution 2" (study std2)
    v1: Variables "Dependent Variables 1"
    s1: Stationary "Stationary Solver 1"
      dDef: Direct
      p1: Parametric | pname = freq; plistarr = range(2000,20,3700); punit = Hz; pcontinuationmode = no
      fc1: FullyCoupled
  sol3 "Solution 3" (study std3)
    v1: Variables "Dependent Variables 1"
    e1: Eigenvalue "Eigenvalue Solver 1" | shift = 3000[Hz]; transform = eigenfrequency; eigref = 100
      dDef: Direct