// COMSOL Multiphysics 5.2.0.220 model "labyrinthine.mph"
// Outline of the model tree

Parameters
  W = 0.1
  H = 0.025
  a1 = 0.006
  b1 = 0.0016
  a2 = 0.006
  b2 = 0.0049
  a3 = 0.006
  b3 = 0.015
  b4 = 0.0084
  a4 = 0.006
  a5 = 0.006
  b5 = 0.0117

Variables
  var1 "Variables 1"
    p_i = exp(-1i*acpr.k*x)[Pa]
    s11 = intop1(acpr.p_t-p_i)/intop1(p_i)
    s21 = intop2(acpr.p_t)/intop1(p_i)

Couplings
  intop1: Integration on boundaries 1
  intop2: Integration on boundaries 24

Geometry
  geom1 "Geometry 1" (2D, length unit m)
    r1: Rectangle | pos = {0, 0}; base = center; size = {W, H}
    b1: BezierPolygon "Bézier Polygon 1" | contributeto = csel1; p = {{-b1, -b1}, {H/2-a1, -H/2}}; degree = 1; w = {1, 1}
    b2: BezierPolygon "Bézier Polygon 2" | contributeto = csel1; p = {{-b2, -b2}, {H/2, a2-H/2}}; degree = 1; w = {1, 1}
    b3: BezierPolygon "Bézier Polygon 3" | contributeto = csel1; p = {{-b3, -b3}, {H/2-a3, -H/2}}; degree = 1; w = {1, 1}
    rot1: Rotate (disabled) | input = b1(1), b2(1), b3(1); keep = on; rot = 180
    b4: BezierPolygon "Bézier Polygon 4" | contributeto = csel1; p = {{-b4, -b4}, {H/2-a4, -H/2}}; degree = 1; w = {1, 1}
    b5: BezierPolygon "Bézier Polygon 5" | contributeto = csel1; p = {{-b5, -b5}, {H/2, a5-H/2}}; degree = 1; w = {1, 1}
    rot2: Rotate | input = b1(1), b2(1), b3(1), b4(1), b5(1); keep = on; rot = 180
    fin: Finalize "Form Union"

Materials
  mat1: Common "Air 1" on all domains
    def "Basic"
      density = 1.25*(1-0.005*i)
      soundspeed = 343/(1-0.005*i)

Physics
  acpr: PressureAcoustics "Pressure Acoustics, Frequency Domain" on domains 1
    dependent variable p
    fpam1: FrequencyPressureAcousticsModel "Pressure Acoustics 1" (default)
    shb1: SoundHard "Sound Hard Boundary (Wall) 1" (default)
    init1: init "Initial Values 1" (default)
    pwr1: PlaneWaveRadiation on boundaries 1, 24
      ipf1: IncidentPressureField on boundaries 1-3, 5, 7, 9, 11, 13, 15, 17, 19, 21, 23 | dir = {1, 0, 0}; pamp = 1
    ishb1: InteriorSoundHard "Interior Sound Hard Boundary (Wall) 1" on boundaries 4, 6, 8, 10, 12

Mesh
  mesh1 "Mesh 1" (physics-controlled)
    size: MeshSizeDefault | hauto = 3

Studies
  std1 "Study 1"
    freq: Frequency "Frequency Domain" | punit = Hz; plist = range(100,100,4000)
  std2 "Study 2"
    opt: Optimization
      optsolver = neldermead
      opttol = 0.0001
      optobj = abs(comp1.s21)
      optobjEvaluateFor = freq
      objectivetype = maximization
      objectivesolution = auto
      initval = {0.0016, 0.0049, 0.0084, 0.0117}
      scale = {1, 1, 1, 1}
      lbound = {0, 0, 0, 0}
      ubound = {b3, b3, b3, b3}
      pname = {b1, b2, b4, b5}
      constraintExpression = {b2-b1, b4-b2, b5-b4}
      constraintLbound = {0, 0, 0}
      constraintUbound = {, , }
      objtable = tbl5
    freq: Frequency "Frequency Domain" | punit = Hz; plist = range(100,100,3500)

Solver configurations
  sol2 "Solution 2" (study std2)
    v1: Variables "Dependent Variables 1"
    s1: Stationary "Stationary Solver 1" | stol = 0.001
      dDef: Direct
      p1: Parametric | pname = freq; plistarr = range(100,100,3500); punit = Hz; pcontinuationmode = no
      fc1: FullyCoupled | linsolver = dDef
  sol3 "Solution 3" (study std1)
    v1: Variables "Dependent Variables 1"
    s1: Stationary "Stationary Solver 1" | stol = 0.001
      dDef: Direct
      p1: Parametric | pname = freq; plistarr = range(100,100,4000); punit = Hz; pcontinuationmode = no
      fc1: FullyCoupled | linsolver = dDef

Datasets
  dset3: Solution | solution = sol2
  dset4: Solution | solution = sol3

Derived values
  pev1: EvalPoint "Transmission" on points 2 | data = dset4; table = tbl10; expr = abs(s21); unit = 1
  pev2: EvalPoint "Phase" on points 2
    data = dset4
    table = tbl6
    expr = arg(intop2(p_i)/intop2(acpr.p_t))*180/pi
    unit = rad

Tables
  tbl3: Table "Transmission"
    // Point Evaluation 1 (abs(s21p))
    freq (Hz) | abs(s21) (1), Point: 2
    100 | 0.954219
    200 | 0.854045
    300 | 0.748997
    400 | 0.662499
    500 | 0.598374
    600 | 0.553994
    700 | 0.526012
    800 | 0.511936
    900 | 0.510352
    1000 | 0.520839
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  tbl5: Table "Objective Table 5"
    b1 | b2 | b4 | b5 | Objective
    0.0016 | 0.0049 | 0.0084 | 0.0117 | 20.0802
    0.015 | 0.0049 | 0.0084 | 0.0117 | 19.4091
    0.0016 | 0.015 | 0.0084 | 0.0117 | 0
    0.0016 | 0.0049 | 0 | 0.0117 | 0
    0.0016 | 0.0049 | 0.0084 | 0 | 19.3005
    0.003275 | 0.00995 | 0.00735 | 0.0102375 | 19.5576
    0.015 | 0.0049 | 0.0084 | 0.0117 | 19.4091
    0.0032 | 0.0049 | 0.0084 | 0.0117 | 16.6767
    0.0016 | 0.015 | 0.0084 | 0.0117 | 0
    0.0016 | 0.0098 | 0.0084 | 0.0117 | 15.3762
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  tbl6: Table "Phase"
    // Phase Delay (arg(intop2(p_i)/intop2(acpr.p_t))*180/pi)
    freq (Hz) | arg(intop2(p_i)/intop2(acpr.p_t))*180/pi (rad), Point: 2 | arg(intop2(p_i)/intop2(acpr.p_t))*180/pi (rad), Point: 2
    100 | 17.7647 | 17.8216
    200 | 32.0593 | 32.2102
    300 | 42.236 | 42.5109
    400 | 49.2582 | 49.6683
    500 | 54.2198 | 54.7649
    600 | 57.9413 | 58.6152
    700 | 61.0077 | 61.8001
    800 | 63.873 | 64.7695
    900 | 66.9533 | 67.9335
    1000 | 70.7141 | 71.7477
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  tbl9: Table "Global Constraints Table 9"
    b1 | b2 | b4 | b5 | min( b2-b1 ) | max( b2-b1 ) | min( b4-b2 ) | max( b4-b2 ) | min( b5-b4 ) | max( b5-b4 )
    0.0016 | 0.0049 | 0.0084 | 0.0117 | 0.0033 | 0.0033 | 0.0035 | 0.0035 | 0.0033 | 0.0033
    0.015 | 0.0049 | 0.0084 | 0.0117 | -0.0101 | -0.0101 | 0.0035 | 0.0035 | 0.0033 | 0.0033
    0.0016 | 0.015 | 0.0084 | 0.0117 | 0.0134 | 0.0134 | -0.0066 | -0.0066 | 0.0033 | 0.0033
    0.0016 | 0.0049 | 0 | 0.0117 | 0.0033 | 0.0033 | -0.0049 | -0.0049 | 0.0117 | 0.0117
    0.0016 | 0.0049 | 0.0084 | 0 | 0.0033 | 0.0033 | 0.0035 | 0.0035 | -0.0084 | -0.0084
    0.003275 | 0.00995 | 0.00735 | 0.0102375 | 0.006675 | 0.006675 | -0.0026 | -0.0026 | 0.0028875 | 0.0028875
    0.015 | 0.0049 | 0.0084 | 0.0117 | -0.0101 | -0.0101 | 0.0035 | 0.0035 | 0.0033 | 0.0033
    0.0032 | 0.0049 | 0.0084 | 0.0117 | 0.0017 | 0.0017 | 0.0035 | 0.0035 | 0.0033 | 0.0033
    0.0016 | 0.015 | 0.0084 | 0.0117 | 0.0134 | 0.0134 | -0.0066 | -0.0066 | 0.0033 | 0.0033
    0.0016 | 0.0098 | 0.0084 | 0.0117 | 0.0082 | 0.0082 | -0.0014 | -0.0014 | 0.0033 | 0.0033
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  tbl10: Table
    // Transmission (abs(s21))
    freq (Hz) | abs(s21) (1), Point: 2
    100 | 0.92519
    200 | 0.781275
    300 | 0.65325
    400 | 0.560529
    500 | 0.497691
    600 | 0.457056
    700 | 0.433154
    800 | 0.422735
    900 | 0.424233
    1000 | 0.437391
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
Plots
  pg3: PlotGroup2D "Acoustic Pressure (acpr) 1" | data = dset3
    surf1: Surface | expr = acpr.p_t
  pg4: PlotGroup2D "Sound Pressure Level (acpr) 1" | data = dset3
    surf1: Surface | expr = acpr.Lp; unit = dB
  pg5: PlotGroup1D "Res" | data = none
    tblp1: Table "Transmission" | table = tbl3
    tblp2: Table "Phase" | table = tbl6
  pg6: PlotGroup1D "Phase" (disabled) | data = none
    tblp1: Table "Phase" | table = none
  pg7: PlotGroup2D "Acoustic Pressure (acpr) 2" | data = dset4
    surf1: Surface | expr = acpr.p_t
  pg8: PlotGroup2D "Sound Pressure Level (acpr) 2" | data = dset4
    surf1: Surface | expr = acpr.Lp; unit = dB
  pg10: PlotGroup1D "1D Plot Group 10" | data = none
    tblp1: Table "Table Graph 1" | table = tbl3
  pg11: PlotGroup1D "1D Plot Group 11" | data = none
    tblp1: Table "Table Graph 1" | table = tbl6
  pg12: PlotGroup1D "1D Plot Group 12" | data = none
    tblp1: Table "Table Graph 1" | table = tbl10
  pg13: PlotGroup1D "1D Plot Group 13" | data = none
    tblp1: Table "Table Graph 1" | table = tbl5